// COMSOL Multiphysics 5.6.0.401 model "B0-WiresWithshielding.mph"
// Outline of the model tree

Parameters
  MSR_interior = 2.4[m]
  wall_thick = 75[mm]  // 4mm real thickenss if memory serves
  World_Rad = 3[m]
  Coil_extent = 1[m]
  Cell_radius = 0.18[m]
  Cell_height = 0.1505[m]
  Cell_offset = 0.05[m]  // offset from zero to inside face of cell
  wire_switch = 250000
  mu_perm = 40000

Variables
  var1 "Variables 1" on no points
    HReNorm1 = mf.normH  // renormalization factor for comparing with Ideal Field

Probes
  pdom1: DomainPoint "Domain Point Probe 1" | coords = {0, 0, 0.2}
    ppb1: PointExpr "Point Probe Expression 1"
      expr = mf.normB
      unit = T
      descr = Magnetic flux density norm
      table = tbl2
  pdom2: DomainPoint "Domain Point Probe 2"
    ppb2: PointExpr "Point Probe Expression 2"
      expr = mf.normB
      unit = T
      descr = Magnetic flux density norm
      table = tbl2

Geometry
  geom1 "Geometry 1" (3D, length unit m)
    sph1: Sphere | r = World_Rad
    cyl1: Cylinder | contributeto = csel3; pos = {0, 0, 0.05}; r = 0.18; h = 0.1505
    cyl2: Cylinder | contributeto = csel3; pos = {0, 0, -(.05+0.1505)}; r = 0.18; h = 0.1505
    ls1: LineSegment
      contributeto = csel4
      specify1 = coord
      coord1 = {0, 0, -MSR_interior/2}
      specify2 = coord
      coord2 = {0, 0, MSR_interior/2}
    ls2: LineSegment
      contributeto = csel4
      specify1 = coord
      coord1 = {0, -MSR_interior/2, 0}
      specify2 = coord
      coord2 = {0, MSR_interior/2, 0}
    ls3: LineSegment
      contributeto = csel4
      specify1 = coord
      coord1 = {-MSR_interior/2, 0, 0}
      specify2 = coord
      coord2 = {MSR_interior/2, 0, 0}
    blk1: Block | contributeto = csel5; base = center; size = {MSR_interior, MSR_interior, MSR_interior}
    blk2: Block
      contributeto = csel5
      base = center
      size = {MSR_interior+wall_thick, MSR_interior+wall_thick, MSR_interior+wall_thick}
    uni3: Union | input = blk1, blk2, cyl1, cyl2, ls1, ls2, ls3, sph1
    blk9: Block (disabled) | pos = {0, 0, -World_Rad}; size = {World_Rad, World_Rad, 2*World_Rad}
    int3: Intersection (disabled) | input = blk9, uni3
    coila-0: Polygon
      contributeto = csel1
      type = closed
      source = file
      filename = C:\Users\myles\Desktop\newer comsol models\B0Coil-Wires\B0Coil-2022_04_14-NewFloor-JeffOptimizedxValues\coila-0.csv
    fin: Finalize "Form Union"
    rmd1: RemoveDetails
      maxabssize = 0.006
      contangletol = 20
      infotype = result
      removeddetails = {Ignored_vertices, 4870}
      selection = entities
      input = selection csel1.edg
      aigv1: IgnoreVertices
        input = fin(1) points 15-50, 183-190, 207-218, 235-242, 291-294, 311-354, 359-374, 383-498, 503-706, 727-742, 755-990, 995-1114, 1119-1822, 1825-1836, 1854-1865, 1868-2571, 2578-2709, 2714-2973, 2994-3009, 3012, 3013, 3018, 3019, 3042-3297, 3304-3479, 3488-3515, 3520-3593, 3610-3617, 3634, 3635, 3652, 3653, 3670-3683, 3700-3721, 3738-3751, 3884-3983, 3988-4035, 4038-4069, 4072-4083, 4088-4099, 4102-4133, 4136-4171, 4174-4227, 4230-4303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
      aigv2: IgnoreVertices | input = aigv1(1) points 251-254, 384-387
      aigv3: IgnoreVertices | input = aigv2(1) points 15-110, 247-250, 255-278, 330, 331, 340-373, 380-383, 520-615
      aigv4: IgnoreVertices
        input = aigv3(1) points 17-24, 41-48, 51-146, 224-319, 322-329, 346-353, 400-471, 500-547, 562-657

Materials
  mat2: Common "Air" on all domains
    def "Basic"
      thermalexpansioncoefficient = alpha_p(pA,T)
      molarmass = 0.02897[kg/mol]
      bulkviscosity = muB(T)
      relpermeability = 1
      relpermittivity = 1
      dynamicviscosity = eta(T)
      ratioofspecificheat = 1.4
      electricconductivity = 0[S/m]
      heatcapacity = Cp(T)
      density = rho(pA,T)
      thermalconductivity = k(T)
      soundspeed = cs(T)
      eta: Piecewise | arg = T; pieces = {200.0, 1600.0, -8.38278E-7+8.35717342E-8*T^1-7.69429583E-11*T^2+4.6437266E-14*T^3-1.06585607E-17*T^4}; argunit = K; fununit = Pa*s
      Cp: Piecewise | arg = T; pieces = {200.0, 1600.0, 1047.63657-0.372589265*T^1+9.45304214E-4*T^2-6.02409443E-7*T^3+1.2858961E-10*T^4}; argunit = K; fununit = J/(kg*K)
      rho: Analytic | expr = pA*0.02897/R_const[K*mol/J]/T; args = {pA, T}; dermethod = manual; argders = {{pA, d(pA*0.02897/R_const/T,pA)}, {T, d(pA*0.02897/R_const/T,T)}}; argunit = Pa,K; fununit = kg/m^3
      k: Piecewise | arg = T; pieces = {200.0, 1600.0, -0.00227583562+1.15480022E-4*T^1-7.90252856E-8*T^2+4.11702505E-11*T^3-7.43864331E-15*T^4}; argunit = K; fununit = W/(m*K)
      cs: Analytic | expr = sqrt(1.4*R_const[K*mol/J]/0.02897*T); args = T; dermethod = manual; argunit = K; fununit = m/s
      an1: Analytic | funcname = alpha_p; expr = -1/rho(pA,T)*d(rho(pA,T),T); args = {pA, T}; argunit = Pa,K; fununit = 1/K
      an2: Analytic "Analytic 2a" | funcname = muB; expr = 0.6*eta(T); args = T; argunit = K; fununit = Pa*s
    RefractiveIndex
      n = 1
      ki = 0
    NonlinearModel
      BA = (def.gamma+1)/2
  mat3: Common "Soft Iron (Without Losses)" on no domains
    def "Basic"
      electricconductivity = 0[S/m]
      relpermittivity = 1
      relpermeability = mu_perm
    BHCurve
      normB = BH(normHin)
      normH = BH_inv(normBin)
      Wpm = BH_prim(normHin)
      normHin = sqrt(H1^2+H2^2+H3^2+eps)
      DESCR_PREFIX:normHin = Magnetic field norm
      normBin = sqrt(B1^2+B2^2+B3^2+eps)
      DESCR_PREFIX:normBin = Magnetic flux density norm
      BH: Interpolation
        table = 
          {0, 0}
          {663.146, 1}
          {1067.5, 1.1}
          {1705.23, 1.2}
          {2463.11, 1.3}
          {3841.67, 1.4}
          {5425.74, 1.5}
          {7957.75, 1.6}
          {12298.3, 1.7}
          {20462.8, 1.8}
          {32169.6, 1.9}
          {61213.4, 2}
          {111408, 2.1}
          {188487.757, 2.2}
          {267930.364, 2.3}
          {347507.836, 2.4}
        extrap = linear
        argunit = A/m
        fununit = T
        defineinv = on
        defineprimfun = on
    EffectiveBHCurve
      normBeff = BHeff(normHeffin)
      normHeff = BHeff_inv(normBeffin)
      normHeffin = sqrt(realdot(H1,H1)+realdot(H2,H2)+realdot(H3,H3)+eps)
      DESCR_PREFIX:normHeffin = Effective magnetic field norm
      normBeffin = sqrt(realdot(B1,B1)+realdot(B2,B2)+realdot(B3,B3)+eps)
      DESCR_PREFIX:normBeffin = Effective magnetic flux density norm
      BHeff: Interpolation
        table = 
          {0, 0}
          {663.146, 1.00000005169}
          {1067.5, 1.49364951241}
          {1705.23, 1.94153284613}
          {2463.11, 2.25776566937}
          {3841.67, 2.60998064243}
          {5425.74, 2.86644520908}
          {7957.75, 3.14414380972}
          {12298.3, 3.44853805165}
          {20462.8, 3.78167119737}
          {32169.6, 4.05834559011}
          {61213.4, 4.42064655295}
          {111408, 4.72127408955}
          {188487.757, 4.97214814072}
          {267930.364, 5.14551086086}
          {347507.836, 5.24551086143}
        extrap = linear
        argunit = A/m
        fununit = T
        defineinv = on

Physics
  mf: InductionCurrents "Magnetic Fields" on all domains
    dependent variable A = {Ax, Ay, Az}
    al1: AmperesLaw "Ampère's Law 1" (default)
    mi1: MagneticInsulation (default)
    init1: init "Initial Values 1" (default)
    edc1: EdgeCurrent on selection geom1_csel1_edg | Ie = 0.4

Mesh
  mesh1 "Mesh 1"
    size: MeshSizeDefault | hauto = 3
    edg2: Edge on no edges
      size1: Size on no edges | hmax = 0.06; hauto = 1; custom = on
    map1: Map "Mapped 1" on boundaries 10-14, 31 | adjustedgdistr = on
      size1: Size on boundaries 10-14, 31 | hmax = 0.06; hauto = 1; custom = on
    conv1: Convert on entire geometry | splitmethod = center
    edg1: Edge on edges 22-71, 82-87, 117-121, 124-240
      size1: Size on edges 22-71, 82-87, 117-121, 124-240 | hmax = 0.02; hauto = 3; custom = on
    ftet3: FreeTet "Free Tetrahedral 3" on domains 3 | method = del; optlevel = high; optlarge = on; optsmall = on
      size1: Size on domains 3 | hauto = 4
    ftet2: FreeTet "Free Tetrahedral 2" on domains 2
    ftet1: FreeTet "Free Tetrahedral 1" on remaining entities

Studies
  std1 "Study 1"
    param: Parametric "Parametric Sweep" | pname = mu_perm; plistarr = 1,40000; useaccumtable = on
    stat: Stationary

Solver configurations
  sol1 "Solution 1" (study std1)
    v1: Variables "Dependent Variables 1"
    s1: Stationary "Stationary Solver 1"
      p1: Parametric | pname = mu_perm; plistarr = 1,40000; pcontinuationmode = no
      fc1: FullyCoupled
      i1: Iterative | linsolver = fgmres; nlinnormuse = on
        mg1: Multigrid

Datasets
  an4_ds1: Grid3D
    function = all
    data = none
    parmin1 = -MSR_interior/2
    parmax1 = MSR_interior/2
    parmin2 = -MSR_interior/2
    parmax2 = MSR_interior/2
    parmin3 = -MSR_interior/2
    parmax3 = MSR_interior/2
  dset4: Solution | solution = sol1
  cln1: CutLine3D | data = dset4; genpoints = {{0, 0, -1}, {0, 0, 1}}

Tables
  tbl1: Table
    // Volume Integration 1 {int1}
    (x*mf2.Bx + y*mf2.By)/(0.015318[m^3]) (Wb/m) | (x*mf.Bx + y*mf.By)/(0.015318[m^3]) (Wb/m) | (x*Pix10(x,y,z) + y*Piy10(x,y,z))/(0.015318[m^3]) (A) | (x*mf.Bx + y*mf.By)/(0.015318[m^3]) (Wb/m) | (x*mf2.Bx + y*mf2.By)/(0.015318[m^3]) (Wb/m)
    -1.78143e-07 | -9.58653e-08 | 1.57127e-11 | -9.9259e-08 | -1.84267e-07
  tbl2: Table "Probe Table 2"
    mu_perm | Magnetic flux density norm (T), Point: (0, 0, 0.2) | Magnetic flux density norm (T), Point: (0, 0, 0)
    40000 | 2.88353e-06 | 2.88352e-06
  tbl3: Table
    // Point Probe Expression 1 {pev1}
    Magnetic flux density norm (T), Point: (0, 0, 0.2) | Magnetic field norm (A/m), Point: (0, 0, 0.2)
    2.46495e-06 | 1.96155
  tbl5: Table
    // Point Probe Expression 1 {pev1}
    Magnetic flux density norm (T), Point: (0, 0, 0.2)
    2.43098e-06
  tbl6: Table
    // Point Probe Expression 2 {pev2}
    Magnetic flux density norm (T), Point: (0, 0, 0.2)
    4.52374e-06
  tbl7: Table
    // Volume Integration 1 {int1}
    wire_switch | 1 (m^3) | x*mf.Hx + y*mf.Hy (m^3*A) | x*g20Bx(x,y,z)*2.9 + y*g20By(x,y,z)*2.9 (m^3*A) | mf.Hz - g20Bz(x,y,z)*2.9 (m^2*A) | Magnetic field, z component (m^2*A) | g20Bx(x,y,z)*2.9 (m^2*A)
    250000 | 0.015319 | -0.000100303 | -9.01409e-05 | 0.000328535 | 0.000749467 | 3.01463e-13
    260000 | 0.015319 | -9.45653e-05 | -9.01409e-05 | -6.39882e-05 | 0.000356944 | 8.46355e-18
    270000 | 0.015319 | -8.78772e-05 | -9.01409e-05 | -0.00053007 | -0.000109138 | 8.35513e-18
    280000 | 0.015319 | -7.9983e-05 | -9.01409e-05 | -0.00107761 | -0.000656679 | 8.58722e-18
  tbl8: Table
    // Surface Maximum 1 {max1}
    wire_switch | Magnetic flux density, z component (T) | Magnetic flux density, y component (T) | Magnetic flux density, x component (T) | Magnetic flux density norm (T) | Magnetic flux density, z component (T) | Magnetic flux density, y component (T) | Magnetic flux density, x component (T) | Magnetic flux density norm (T)
    250000 | 1.86802e-07 | 1.46746e-07 | 1.04296e-09 | 1.89515e-07 | 2.6915e-05 | 4.66593e-05 | 4.28923e-06 | 5.22742e-05
    260000 | 1.47253e-07 | 1.38281e-07 | 1.21166e-09 | 1.62005e-07 | 2.75071e-05 | 4.52809e-05 | 4.77132e-06 | 5.06925e-05
    270000 | 1.00246e-07 | 1.28346e-07 | 1.09764e-09 | 1.35264e-07 | 2.97864e-05 | 4.38025e-05 | 4.00407e-06 | 4.89915e-05
    280000 | 4.46787e-08 | 1.1657e-07 | 9.96541e-10 | 1.33263e-07 | 2.12858e-05 | 4.24568e-05 | 3.93408e-06 | 4.74511e-05
  tbl9: Table
    // Surface Minimum 1 {min1}
    wire_switch | Magnetic flux density, z component (T) | Magnetic flux density, z component (T)
    250000 | -3.3323e-08 | -4.67279e-05
    260000 | -6.01171e-08 | -4.5243e-05
    270000 | -9.22576e-08 | -4.37315e-05
    280000 | -1.29981e-07 | -4.23645e-05

Plots
  pg5: PlotGroup3D "Magnetic Flux Density Norm (mf)" | data = dset4
    mslc1: Multislice | expr = mf.normB
  pgHx: PlotGroup1D "Bz on Z-axis" | data = cln1; xlabel = axis position(m)
    ann3: Annotation "Coil upper inner" | text = Cell Edges
    ann2: Annotation "Coil upper outer"
    ann1: Annotation "Cell lower outer" | text = Cell Edges
    ann4: Annotation "cell lower inner"
    ann5: Annotation "Cell lower outer 1" | text = Coil Edge
    ann6: Annotation "Coil Edge upper" | text = Coil Edge
    lngr1: LineGraph | expr = mf.normB; xdata = expr; xdataexpr = z

Methods
  WiresLoad: CodeEditor
    public class WiresLoad extends ApplicationMethod {
      public void execute() {
        // takes a folder of csv files that contain the orderd set of points to define the interpolation curves that define the wire surfaces.
        //sets what component and geometry receive the wire objects.  Must exist before running
        String tarcomp = "comp1";
        String targeom = "geom1";
        //name of the folder to load the wires from.  Requires an absolute path updated for each user.
        String foldername = "C:\\Users\\username\\B0Coil-Wires\\B0Coil-2022_04_14-NewFloor";
        File folder = new File(foldername);
        String[] files = folder.list();
        for (String file : files)
        {
          if (file.startsWith("coil"))
          {
            String file_location = foldername+"\\"+file;
            String feature_name = file.substring(0, file.length()-4);
            //feature_name = feature_name.concat("wider");
            //model.component(tarcomp).geom(targeom).create(feature_name, "InterpolationCurve");
            //model.component(tarcomp).geom(targeom).feature(feature_name).set("rtol", 0.0001);
            model.component(tarcomp).geom(targeom).create(feature_name, "Polygon");
            model.component(tarcomp).geom(targeom).feature(feature_name).set("type", "closed");
            model.component(tarcomp).geom(targeom).feature(feature_name).set("source", "file");
            model.component(tarcomp).geom(targeom).feature(feature_name).set("filename", file_location);
            model.component(tarcomp).geom(targeom).feature(feature_name).set("contributeto", "csel1");
          }
        }
      }
    }
  ScalarG10: CodeEditor
    public class ScalarG10 extends ApplicationMethod {
      public void execute() {
        //creates and analystic equation of the given form and name.
        model.func().create("an1", "Analytic");
        model.func("an1").set("funcname", "Phi10");
        model.func("an1").set("args", "x y z");
        model.func("an1").set("argunit", "m");
        model.func("an1").set("fununit", "A");
        model.func("an1").set("expr", "((x^2)/4)-(( y^2)/4)+(( z^2)/2)");
        model.func().create("an4", "Analytic");
        model.func("an4").set("funcname", "Pix10");
        model.func("an4").set("expr", "-pd(Phi10(x,y,z),x)");
        model.func("an4").set("fununit", "A/m");
      }
    }
  AddMeshing: CodeEditor
    public class AddMeshing extends ApplicationMethod {
      public void execute() {
        //common meshing steps for meshing wires from WiresLoad, axis lines for plotting and the primary region of interest for the coil.
        String comp = "comp1";
        String geom = "geom1";
        String mesh = "mesh2";
        //set meshing of wires
        model.component(comp).mesh(mesh).create("edg1", "Edge");
        model.component(comp).mesh(mesh).feature("edg1").selection().named(geom+"_csel1_edg");
        model.component(comp).mesh(mesh).feature("edg1").create("size1", "Size");
        model.component(comp).mesh(mesh).feature("edg1").feature("size1").set("custom", true);
        model.component(comp).mesh(mesh).feature("edg1").feature("size1").set("hmaxactive", true);
        model.component(comp).mesh(mesh).feature("edg1").feature("size1").set("hminactive", true);
        model.component(comp).mesh(mesh).feature("edg1").feature("size1").set("hmax", 0.025);
        model.component(comp).mesh(mesh).feature("edg1").feature("size1").set("hmin", 0.01);
        //set meshing of axis lines
        model.component(comp).mesh(mesh).create("edg2", "Edge");
        model.component(comp).mesh(mesh).feature("edg2").selection().named(geom+"_csel4_edg");
        model.component(comp).mesh(mesh).feature("edg2").create("size1", "Size");
        model.component(comp).mesh(mesh).feature("edg2").feature("size1").set("hmaxactive", true);
        model.component(comp).mesh(mesh).feature("edg2").feature("size1").set("hminactive", true);
        model.component(comp).mesh(mesh).feature("edg2").feature("size1").set("hmax", 0.03);
        model.component(comp).mesh(mesh).feature("edg2").feature("size1").set("hmin", 0.01);
        //set meshing of out surface of measurement volumes
        String featname = "mapMeasCell";
        model.component(comp).mesh(mesh).create(featname, "Map");
        model.component(comp).mesh(mesh).feature(featname).selection().named(geom+"_csel3_bnd");
        model.component(comp).mesh(mesh).feature(featname).create("size1", "Size");
        model.component(comp).mesh(mesh).feature(featname).feature("size1").set("custom", true);
        model.component(comp).mesh(mesh).feature(featname).feature("size1").set("hmaxactive", true);
        model.component(comp).mesh(mesh).feature(featname).feature("size1").set("hminactive", true);
        model.component(comp).mesh(mesh).feature(featname).feature("size1").set("hmax", 0.015);
        model.component(comp).mesh(mesh).feature(featname).feature("size1").set("hmin", 0.005);
        //MSR Stand-in meshing
        model.component(comp).mesh(mesh).create("ftet2", "FreeTet");
        model.component(comp).mesh(mesh).feature("ftet2").label("MSR Standin Meshing");
        model.component(comp).mesh(mesh).feature("ftet2").selection().geom(geom, 3);
        model.component(comp).mesh(mesh).feature("ftet2").selection().named(geom+"_csel5_dom");
        model.component(comp).mesh(mesh).feature("ftet2").create("size1", "Size");
        with(model.component(comp).mesh(mesh).feature("ftet2").feature("size1"));
          set("hauto", 3);
        endwith();
      }
    }